OpenVSP model (file version 5), 5 components.
Geometry view with OpenVSP parameter names; values to 6 digits, angles in degrees, lengths in the model's unit.
Overall bounding box: X_Min=0 X_Len=2.5 Y_Min=-3 Y_Len=6 Z_Min=-0.166667 Z_Len=0.566667

Wing "Vertical Tail"
  location (X Y Z) 2.1 0 0, rotation 90 0 0
  symmetric about XZ
  bounding box size 0.38094 0.0250145 0.4
  totals: TotalSpan=0.8 TotalProjectedSpan=0.8 TotalChord=0.2 TotalArea=0.16 TotalAR=4 MAC=0.204167
  root: chord 0.25, twist 0, NACA 4-series Camber=0 CamberLoc=0.2 ThickChord=0.1
  sections:
    n  Span  Root_Chord  Tip_Chord  Area  Sweep  Sweep_Location  Dihedral  Twist  Twist_Location  tip airfoil
    1  0.4   0.25        0.15       0.08  30     0               0         0      0.25            as above

Wing "Horizontal Tail"
  location (X Y Z) 2.1 0 0.05, rotation 0 0 0
  symmetric about XZ
  bounding box size 0.2 1.6 0.0240109
  totals: TotalSpan=1.6 TotalProjectedSpan=1.6 TotalChord=0.175 TotalArea=0.28 TotalAR=9.14286 MAC=0.17619
  root: chord 0.2, twist 0, NACA 4-series Camber=0 CamberLoc=0.1 ThickChord=0.12
  sections:
    n  Span  Root_Chord  Tip_Chord  Area  Sweep  Sweep_Location  Dihedral  Twist  Twist_Location  tip airfoil
    1  0.8   0.2         0.15       0.14  0      0               0         0      0.25            as above

Wing "Main Wing"
  location (X Y Z) 1 0 0, rotation 0 0 0
  symmetric about XZ
  bounding box size 0.400415 6 0.0657407
  totals: TotalSpan=6 TotalProjectedSpan=6 TotalChord=0.3 TotalArea=1.8 TotalAR=20 MAC=0.311111
  root: chord 0.4, twist 0, NACA 4-series Camber=0.06 CamberLoc=0.4 ThickChord=0.15
  sections:
    n  Span  Root_Chord  Tip_Chord  Area  Sweep  Sweep_Location  Dihedral  Twist  Twist_Location  tip airfoil
    1  3     0.4         0.2        0.9   0      0               0         0      0.25            as above

Pod "Fuselage"
  location (X Y Z) 0 0 0, rotation 0 0 0
  bounding box size 2.5 0.333333 0.333333
  Design: FineRatio=15 Length=2.5

Mesh "MeshGeom"
  location (X Y Z) 0 0 0, rotation 0 0 0
  bounding box size 2.5 6 0.566667
  triangle mesh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

VSPAERO settings: Sref=2.5 bref=3 cref=0.25 Xcg=0 Ycg=0 Zcg=0 AlphaStart=0 AlphaEnd=10 AlphaNpts=6 BetaStart=0 BetaEnd=0 BetaNpts=1 MachStart=0 MachEnd=0 MachNpts=1 ReCref=1e+06 Vinf=100 Rho=0.002377
